// SBML level 3 version 2

model biocrnpyler_550034()
  // model units - substance: mole, time: second, volume: litre, area: square_metre, length: metre, extent: mole

  // Compartments:
  compartment default = 1e-6;

  // Species:
  species rna_M in default = 0;
  species monomer_betaGal in default = 0;
  species protein_betaGal in default = 0;
  species Lactose_external in default = 5000;
  species Lactose_internal in default = 0;
  species Glucose_external in default = 5000;
  species Glucose_internal in default = 0;
  species protein_Lactose_Permease in default = 0;
  species dna_Lac_Operon in default = 3.2e-6;
  species protein_Biomass in default = 0.00166;
  species Lactose_consumed in default = 0;

  // Parameters:
  k_tl_beta_Gal__ = 0.1566667;
  k_tl_lacP__ = 0.3133333;
  BGal_tetramerization__ = 1000;
  BGal_vmax__ = 30;
  Bgal_Kd__ = 700000;
  GluPermease_vmax__ = 2005;
  GluPermease_Kd__ = 0.015;
  LacPermease_reverse_vmax__ = 1.189667;
  LacPermease_Kd__ = 14.62;
  kdeg_mRNA__ = 0.007833333;
  kdeg_prot__ = 0.0001666667;
  k_dilution__ = 0.0003333333;

  // Reactions:
  r0: dna_Lac_Operon => dna_Lac_Operon + rna_M; dna_Lac_Operon*(k_leak + Vtx*Lactose_internal^n_L/(K_L^n_L + Lactose_internal^n_L)*(1/(K_G^n_G + Glucose_external^n_G)));  // modifiers: Lactose_internal, Glucose_external
    Vtx = 0.003; n_L = 4; K_L = 4.8155; K_G = 0.0025; n_G = 2; k_leak = 0.0003;
  r1: rna_M => rna_M + monomer_betaGal; k_tl_beta_Gal__*rna_M;
  r2: rna_M => rna_M + protein_Lactose_Permease; k_tl_lacP__*rna_M;
  r3: 4 monomer_betaGal => protein_betaGal; BGal_tetramerization__*monomer_betaGal^4;
  r4: Lactose_internal => Lactose_consumed; BGal_vmax__*protein_betaGal*Lactose_internal^r4_n/(Bgal_Kd__^r4_n + Lactose_internal^r4_n);  // modifiers: protein_betaGal
    r4_n = 1;
  r5: Glucose_external => Glucose_internal; GluPermease_vmax__*protein_Biomass*Glucose_external^r5_n/(GluPermease_Kd__^r5_n + Glucose_external^r5_n);  // modifiers: protein_Biomass
    r5_n = 1;
  r6: Lactose_external => Lactose_internal; protein_Lactose_Permease*LacPermease_vmax*Lactose_external/(Lactose_external + LacPermease_Kd)*(1 - phi_G*Glucose_external/(GluPermease_Kd + Glucose_external));  // modifiers: Glucose_external, protein_Lactose_Permease
    GluPermease_Kd = 0.015; LacPermease_vmax = 35.8; LacPermease_Kd = 0.26; phi_G = 0.35;
  r7: Lactose_internal => Lactose_external; LacPermease_reverse_vmax__*protein_Lactose_Permease*Lactose_internal^r7_n/(LacPermease_Kd__^r7_n + Lactose_internal^r7_n);  // modifiers: protein_Lactose_Permease
    r7_n = 1;
  r8: rna_M => ; kdeg_mRNA__*rna_M;
  r9: protein_betaGal => ; kdeg_prot__*protein_betaGal;
  r10: protein_Lactose_Permease => ; kdeg_prot__*protein_Lactose_Permease;
  r11: protein_Lactose_Permease => ; k_dilution__*protein_Lactose_Permease;
  r12: monomer_betaGal => ; k_dilution__*monomer_betaGal;
  r13: protein_betaGal => ; k_dilution__*protein_betaGal;
  r14: rna_M => ; k_dilution__*rna_M;

  // Unit definitions:
  unit square_metre = metre^2;
end
